# OpenSim document version 40000
Model:
  gravity: 0 -9.8 0
  PhysicalOffsetFrame anchor1: socket_parent=/ground translation=(0.1 0.6 0.3) [meters]
    Brick anchor1_geom_1: half_lengths=(0.05 0.05 0.05)
  PhysicalOffsetFrame anchor2: socket_parent=/ground translation=(-0.1 0.6 -0.3)
    Brick anchor2_geom_1: half_lengths=(0.05 0.05 0.05)
  Ground
  BodySet:
    Body Block: mass=80 [kg] mass_center=(0 0 0) inertia=(0.133 0.133 0.133 0 0 0)
      Brick Block_geom_1: half_lengths=(0.05 0.05 0.05)
  JointSet:
    CustomJoint blockToGround: socket_parent_frame=ground_offset socket_child_frame=Block_offset
      Coordinate Block_tilt: range=(-3.141593 3.141593)
      Coordinate Block_list: range=(-3.141593 3.141593)
      Coordinate Block_rotation: range=(-3.141593 3.141593)
      Coordinate Block_tx: range=(-1 1)
      Coordinate Block_ty: default_value=0.2 range=(-1 1)
      Coordinate Block_tz: range=(-1 1)
      PhysicalOffsetFrame ground_offset: socket_parent=/ground translation=(0 0.05 0)
      PhysicalOffsetFrame Block_offset: socket_parent=/bodyset/Block translation=(0 0 0)
      SpatialTransform:
        TransformAxis rotation1: coordinates=Block_tilt axis=(0 0 1) LinearFunction(coefficients=1 0)
        TransformAxis rotation2: coordinates=Block_list axis=(1 0 0) LinearFunction(coefficients=1 0)
        TransformAxis rotation3: coordinates=Block_rotation axis=(0 1 0) LinearFunction(coefficients=1 0)
        TransformAxis translation1: coordinates=Block_tx axis=(1 0 0) LinearFunction(coefficients=1 0)
        TransformAxis translation2: coordinates=Block_ty axis=(0 1 0) LinearFunction(coefficients=1 0)
        TransformAxis translation3: coordinates=Block_tz axis=(0 0 1) LinearFunction(coefficients=1 0)
  ControllerSet:
    PrescribedController LinearRamp_Controller: actuator_list=(muscle1 muscle2)
      FunctionSet ControlFunctions:
        PiecewiseLinearFunction: x=(0 1 2 3 4 5 7) y=(0.2 0.2 0.7 0.5 0.3 0.4 0.4)
        PiecewiseLinearFunction: x=(0 1 2 3 4 5 7) y=(0.2 0.2 0.5 0.2 0.7 0.2 0.2)
  ForceSet:
    DeGrooteFregly2016Muscle muscle1: min_control=0 max_control=1 max_isometric_force=2000 optimal_fiber_length=0.25
        tendon_slack_length=0.15 pennation_angle_at_optimal=0.1745329 [radians] max_contraction_velocity=100
        passive_fiber_strain_at_one_norm_force=0.55 tendon_strain_at_one_norm_force=0.04
        tendon_compliance_dynamics_mode=explicit
      PathPoint point1: ground (-0.1 0.6 -0.3)
      PathPoint point2: Block (0 0.05 -0.05)
    DeGrooteFregly2016Muscle muscle2: min_control=0 max_control=1 max_isometric_force=2000 optimal_fiber_length=0.25
        tendon_slack_length=0.15 pennation_angle_at_optimal=0.1745329 max_contraction_velocity=100
        passive_fiber_strain_at_one_norm_force=0.55 tendon_strain_at_one_norm_force=0.04
        tendon_compliance_dynamics_mode=explicit
      PathPoint point1: ground (0.1 0.6 0.3)
      PathPoint point2: Block (0 0.05 0.05)
